# sys gmsh part.step -clcurv -3 -o gmsh.inp -order 2
# Reading the Gmsh .geo file and .inp file
sys gmsh Fin.geo
read Fin.inp

# remove all surface elements
seta tozap e all
setr tozap e +C3D10
zap tozap
del se0
# set defination
comp Support do
send all abq
send Support abq nam


# Representation of the set, defined in gmsh and saving the Image
plus n Support
hcpy png
sys mv hcpy_1.png Refs/sets.png
# Command for solving in CCX
sys ccx solve
read solve.frd

# Create the plot for displacement and saving the Image
rot y
rot c 30
rot r 30
view disp
scal d 1000
view elem
ds -0 e 7
plot fv all
hcpy png
sys mv hcpy_2.png Refs/se.png
rot y
rot u 30
plot f all n
hcpy png
sys mv hcpy_3.png Refs/disp.png
